# OpenSim document version 40500
ScaleTool model-scaled:
  height: -1
  age: -1
  ModelScaler:
    apply: true
    scaling_order: measurements
    marker_file: RCH0000002 BBF 02.trc
    time_range: 0.34 0.63
    preserve_mass_distribution: true
    MeasurementSet:
      Measurement Pelvis: apply=false
        MarkerPair: markers=(RASI LASI)
        MarkerPair: markers=(RPSI LPSI)
      Measurement Thigh: apply=false
        MarkerPair: markers=(RASI RKNE)
        MarkerPair: markers=(LASI LKNE)
      Measurement Shank: apply=false
        MarkerPair: markers=(RKNE RANK)
        MarkerPair: markers=(LKNE LANK)
      Measurement Foot: apply=true
        MarkerPair: markers=(RKNE RANK)
        MarkerPair: markers=(LKNE LANK)
        BodyScale talus_l: axes=(X Y Z)
        BodyScale talus_r: axes=(X Y Z)
        BodyScale calcn_l: axes=(X Y Z)
        BodyScale toes_l: axes=(X Y Z)
        BodyScale calcn_r: axes=(X Y Z)
        BodyScale toes_r: axes=(X Y Z)
